// COMSOL Multiphysics 5.4.0.388 model "OGdiagBeamSim.mph"
// Outline of the model tree

Parameters
  len = 7e-3
  offset = 10e-6
  wid = 400e-6
  xrad = rad
  yrad = rad
  thic = 90e-9
  meshDens = 1
  rad = 400e-6
  N_modes = 6
  prestress = 0.9e9
  Ymod = 250e9
  densitySIN = 2700
  Qint = 60*thic*1e9

Common definitions
  mpf1: ParticipationFactors

Geometry
  geom1 "Geometry 1" (2D, length unit m)
    r1: Rectangle | size = {len/sqrt(2), len/sqrt(2)}
    r2: Rectangle | pos = {offset, offset}; size = {len/sqrt(2)-2*offset, len/sqrt(2)-2*offset}
    dif1: Difference | input = r1; input2 = r2
    r3: Rectangle | pos = {len/sqrt(8), len/sqrt(8)}; rot = -45; base = center; size = {wid, len}
    cha1: Chamfer | point = r3(1) points 1-4; dist = wid/2
    e1: Ellipse
      pos = {xrad, (yrad^2)/sqrt(xrad^2+yrad^2)+xrad+(xrad^2)/sqrt(xrad^2+yrad^2)+wid/sqrt(2)}
      rot = 180
      semiaxes = {xrad, yrad}
      angle = 90+180/pi*atan((xrad^2)/(yrad^2))
    b1: BezierPolygon "Bézier Polygon 1"
      p = 
        {0, xrad, xrad+(xrad^2)/sqrt(xrad^2+yrad^2), 0, 0}
        {(yrad^2)/sqrt(xrad^2+yrad^2)+xrad+(xrad^2)/sqrt(xrad^2+yrad^2)+wid/sqrt(2), (yrad^2)/sqrt(xrad^2+yrad^2)+xrad+(xrad^2)/sqrt(xrad^2+yrad^2)+wid/sqrt(2), xrad+(xrad^2)/sqrt(xrad^2+yrad^2)+wid/sqrt(2), wid/sqrt(2), (yrad^2)/sqrt(xrad^2+yrad^2)+xrad+(xrad^2)/sqrt(xrad^2+yrad^2)+wid/sqrt(2)}
      degree = {1, 1, 1, 1}
      w = {1, 1, 1, 1, 1, 1, 1, 1}
    dif2: Difference | input = b1; input2 = e1
    mir1: Mirror | input = dif2; keep = on; pos = {len, len}; axis = {1, -1}
    mir2: Mirror | input = dif2, mir1; keep = on; pos = {0, len/sqrt(2)}; axis = {1, 1}
    uni1: Union | input = cha1, dif1, dif2, mir1, mir2; intbnd = off; edge = all
    rot1: Rotate | input = uni1; rot = 45
    fin: Finalize "Form Union"

Materials
  mat1: Common "Si3N4 - Silicon nitride" on all domains
    def "Basic"
      electricconductivity = 0[S/m]
      thermalexpansioncoefficient = 2.3e-6[1/K]
      heatcapacity = 700[J/(kg*K)]
      relpermittivity = 9.7
      density = densitySIN
      thermalconductivity = 20[W/(m*K)]
    Enu "Young's modulus and Poisson's ratio"
      youngsmodulus = Ymod
      poissonsratio = 0.23

Physics
  plate: Plate on all domains
    dependent variable u = {u, v, w}
    emm1: Elastic "Linear Elastic Material 1" (default)
      shls1: ShellLocalSystem (default)
      iss1: InitialStressandStrain on all domains | Ni = {0.9e9*thic, 0, 0, 0.9e9*thic}
    to1: ThicknessOffset "Thickness and Offset 1" (default) | d = thic
    free1: Free (default)
    init1: init "Initial Values 1" (default)
    fix1: Fixed "Fixed Constraint 1" on boundaries 1, 2, 5-7, 9-12, 14, 17, 18

Mesh
  mesh1 "Mesh 1"
    size: MeshSizeDefault | hauto = 1
    ftri1: FreeTri "Free Triangular 1" on remaining entities | xscale = meshDens; yscale = meshDens

Studies
  std1 "Study 1"
    stat: Stationary | geometricNonlinearity = on
    eig: Eigenfrequency | neigs = 30; geometricNonlinearity = on

Solver configurations
  sol1 "Solution 1" (study std1)
    v1: Variables "Dependent Variables 1"
    s1: Stationary "Stationary Solver 1"
      dDef: Direct
      fc1: FullyCoupled | linsolver = dDef
    su1: StoreSolution
    v2: Variables "Dependent Variables 2" | initmethod = sol; notsolmethod = sol
    e1: Eigenvalue "Eigenvalue Solver 1" | linpmethod = sol; storelinpoint = on
      dDef: Direct
  sol2 "Solution Store 1" (study std1)

Datasets
  dset1: Solution | solution = sol1
  dset2: Solution | solution = sol2

Derived values
  gev1: EvalGlobal "Global Evaluation 1"
    data = dset1
    table = new
    expr = abs(mpf1.pfRY)
    unit = 1
    descr = Participation Factors
  gev2: EvalGlobal "Global Evaluation 2"
    data = dset1
    table = new
    expr = plate.Wk_tot/plate.Ws_tot*Qint
    unit = 1
    descr = Q Factor

Evaluation groups
  std1EvgFrq: EvaluationGroup "Eigenfrequencies (Study 1)" | data = dset1
    gev1: EvalGlobal "Global Evaluation 1"
      expr = {freq*2*pi, imag(freq)/abs(freq), abs(freq)/imag(freq)/2}
      unit = {rad/s, 1, 1}
      descr = {Angular frequency, Damping ratio, Quality factor}

Plots
  pg1: PlotGroup2D "Mode Shape (plate)" | data = dset1
    surf1: Surface | expr = -w
      hght: Height "Height Expression" | expr = plate.disp

Exports
  img1: Image3D "Image 1"
    size = current
    weblockratio = off
    webwidth = 800
    webheight = 600
    webresolution = 96
    printlockratio = off
    printwidth = 120
    printheight = 90
    printresolution = 300
    options = off