// COMSOL Multiphysics 5.4.0.388 model "rectBeam.mph"
// Outline of the model tree

Parameters
  len = 7e-3
  wid = 400e-6
  thic = 90e-9
  x0 = xrad
  y0 = yrad
  xrad = rad
  yrad = rad
  rad = 400e-6
  offset = 10e-6
  meshDens = 1
  N_modes = 6
  Ymod = 250e9
  prestress = 0.9e9
  densitySIN = 2700
  Qint = 60*thic*1e9

Common definitions
  mpf1: ParticipationFactors

Geometry
  geom1 "Geometry 1" (2D, length unit m)
    r1: Rectangle | size = {len/2, len/2}
    r2: Rectangle | size = {len/2-offset, len/2-offset}
    dif1: Difference | input = r1; input2 = r2
    r3: Rectangle | size = {wid/2, len/2}
    e1: Ellipse | pos = {-(x0+wid/2), y0-2*yrad+len/2}; semiaxes = {xrad, yrad}; angle = 90
    r4: Rectangle | pos = {-(x0+wid/2), y0-2*yrad+len/2}; size = {xrad, yrad}
    dif2: Difference | input = r4; input2 = e1
    mir3: Mirror | input = dif2; axis = {1, 0}
    uni1: Union | input = dif1, mir3, r3; intbnd = off; edge = all
    mir1: Mirror | input = uni1; keep = on; axis = {1, 0}
    mir2: Mirror | input = mir1, uni1; keep = on; axis = {0, 1}
    uni2: Union | input = mir1, mir2, uni1; intbnd = off; edge = all
    fin: Finalize "Form Union"

Materials
  mat1: Common "Si3N4 - Silicon nitride" on all domains
    def "Basic"
      electricconductivity = 0[S/m]
      thermalexpansioncoefficient = 2.3e-6[1/K]
      heatcapacity = 700[J/(kg*K)]
      relpermittivity = 9.7
      density = densitySIN
      thermalconductivity = 20[W/(m*K)]
    Enu "Young's modulus and Poisson's ratio"
      youngsmodulus = Ymod
      poissonsratio = 0.23

Physics
  plate: Plate on all domains
    dependent variable u = {u, v, w}
    emm1: Elastic "Linear Elastic Material 1" (default)
      shls1: ShellLocalSystem (default)
      iss1: InitialStressandStrain on all domains | Ni = {prestress*thic, 0, 0, prestress*thic}
    to1: ThicknessOffset "Thickness and Offset 1" (default) | d = thic
    free1: Free (default)
    init1: init "Initial Values 1" (default)
    fix1: Fixed "Fixed Constraint 1" on boundaries 1-4, 9-11, 14-17, 20, 23, 24, 27, 28

Mesh
  mesh1 "Mesh 1"
    size: MeshSizeDefault | hmax = 7.0E-5; hmin = 1.4E-7; hcurve = 0.2; hauto = 1
    ftri1: FreeTri "Free Triangular 1" on remaining entities | xscale = meshDens; yscale = meshDens

Studies
  std1 "Study 1"
    stat: Stationary | geometricNonlinearity = on
    eig: Eigenfrequency | neigs = N_modes; geometricNonlinearity = on

Solver configurations
  sol1 "Solution 1" (study std1)
    v1: Variables "Dependent Variables 1"
    s1: Stationary "Stationary Solver 1"
      dDef: Direct
      fc1: FullyCoupled | linsolver = dDef
    su1: StoreSolution
    v2: Variables "Dependent Variables 2" | initmethod = sol; notsolmethod = sol
    e1: Eigenvalue "Eigenvalue Solver 1" | linpmethod = sol; storelinpoint = on
      dDef: Direct
  sol2 "Solution Store 1" (study std1)

Datasets
  dset1: Solution | solution = sol1
  dset2: Solution | solution = sol2

Derived values
  gev1: EvalGlobal "Participation Factors" | data = dset1; table = new; expr = {abs(mpf1.pfRY), }
  gev2: EvalGlobal "Q Factor" | data = dset1; table = new; expr = (plate.Wk_tot/plate.Ws_tot)*Qint; descr = Q Factor
  max1: MaxSurface "Max Stress" on domains 1 | data = dset1; expr = plate.mises

Evaluation groups
  std1EvgFrq: EvaluationGroup "Eigenfrequencies (Study 1)" | data = dset1
    gev1: EvalGlobal "Global Evaluation 1"
      expr = {freq*2*pi, imag(freq)/abs(freq), abs(freq)/imag(freq)/2}
      unit = {rad/s, 1, 1}
      descr = {Angular frequency, Damping ratio, Quality factor}

Plots
  pg1: PlotGroup2D "Modes" | data = dset1
    surf1: Surface | expr = w
      hght1: Height "Height Expression 1" | expr = plate.disp